OpenVSP model (file version 5), 13 components.
Geometry view with OpenVSP parameter names; values to 6 digits, angles in degrees, lengths in the model's unit.
Overall bounding box: X_Min=0 X_Len=26.277 Y_Min=-17.4624 Y_Len=34.9248 Z_Min=-3.7195 Z_Len=9.61927

Blank "Origin"
  location (X Y Z) 0 0 0, rotation 0 0 0

Blank "182-Parent"
  location (X Y Z) 0 0 0, rotation 0 0 0

Wing "MainWing corr. twist", child of "182-Parent"
  location (X Y Z) 6.39109 0 2.23004, rotation 0 0 0
  symmetric about XZ
  bounding box size 5.33157 34.9248 1.04074
  totals: TotalSpan=34.9316 TotalProjectedSpan=34.9156 TotalChord=4.89573 TotalArea=170.186 TotalAR=7.16334 MAC=4.93807 RelativeTwistFlag=1
  root: chord 5.3333, twist 1.5, airfoil file "NACA 2412"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 BaseThickChord=0.120015 ThickChord=0.120015
  sections:
    n  Span     Root_Chord  Tip_Chord  Area     Sweep    Sweep_Location  Dihedral  Twist     Twist_Location  tip airfoil
    1  8.25883  5.3333      5.3333     44.0468  0        0               1.7333    0         0.3             as above
    2  9.20695  5.3333      3.583      41.046   3.79286  0               1.733     -3.61667  0.3             as above
  SS_Control "SS_CONT_0": UStart=0 UEnd=0.5 Length_C_Start=0.300008 Length_C_End=0.300008 Length_Start=1.6 Length_End=1.6 LE_Flag=0 Surf_Type=2
  SS_Control "SS_CONT_1": UStart=0.5 UEnd=1 Length_C_Start=0.25 Length_C_End=0.25 Length_Start=1.3333 Length_End=0.895731 LE_Flag=0 Surf_Type=2

Wing "Verts-Full", child of "182-Parent"
  location (X Y Z) 15.8495 0 1.07336, rotation 90 0 0
  bounding box size 10.4275 0.381099 4.82641
  totals: TotalSpan=4.82641 TotalProjectedSpan=4.82641 TotalChord=4.92122 TotalArea=19.2768 TotalAR=1.20841 MAC=4.71486
  root: chord 9.07751, twist 0, NACA 4-series Camber=0 CamberLoc=0.445714 ThickChord=0.0321429
  sections:
    n  Span     Root_Chord  Tip_Chord  Area     Sweep    Sweep_Location  Dihedral  Twist  Twist_Location  tip airfoil
    1  1.12242  9.07751     4.23181    7.46934  46.7195  0.822727        0         0      0.25            NACA 4-series Camber=0 CamberLoc=0.2 ThickChord=0.09
    2  3.70399  4.23181     2.14375    11.8075  39.9738  0               0         0      0.25            NACA 4-series Camber=0 CamberLoc=0.2 ThickChord=0.06
  SS_Control "SS_CONT_0": UStart=0 UEnd=1 Length_C_Start=0.268686 Length_C_End=0.5011 Length_Start=2.439 Length_End=1.07423 LE_Flag=0 Surf_Type=2

Wing "Stab außen dünn", child of "182-Parent"
  location (X Y Z) 20.791 0 1.1168, rotation 0 -3.5 0
  symmetric about XZ
  bounding box size 4.43951 10.9888 0.452383
  totals: TotalSpan=10.9888 TotalProjectedSpan=10.9888 TotalChord=3.48444 TotalArea=38.2898 TotalAR=3.15369 MAC=3.5732
  root: chord 4.44771, twist 0, NACA 4-series Camber=0 CamberLoc=0.2 ThickChord=0.09
  sections:
    n  Span     Root_Chord  Tip_Chord  Area     Sweep    Sweep_Location  Dihedral  Twist  Twist_Location  tip airfoil
    1  5.49441  4.44771     2.52116    19.1449  9.65191  0               0         0      0.25            NACA 4-series Camber=0 CamberLoc=0.2 ThickChord=0.06
  SS_Control "SS_CONT_0": UStart=0 UEnd=1 Length_C_Start=0.544208 Length_C_End=0.544208 Length_Start=2.42048 Length_End=1.37203 LE_Flag=0 Surf_Type=2

Wing "C170vert-equivalent", child of "182-Parent"
  location (X Y Z) 20 0 0.82, rotation 90 0 0
  bounding box size 3.333 0.300156 4.71
  totals: TotalSpan=4.71 TotalProjectedSpan=4.71 TotalChord=3.333 TotalArea=15.6984 TotalAR=1.41314 MAC=3.333
  root: chord 3.333, twist 0, NACA 4-series Camber=0 CamberLoc=0.2 ThickChord=0.09
  sections:
    n  Span  Root_Chord  Tip_Chord  Area     Sweep  Sweep_Location  Dihedral  Twist  Twist_Location  tip airfoil
    1  4.71  3.333       3.333      15.6984  0      0.5             0         0      0.25            NACA 4-series Camber=0 CamberLoc=0.2 ThickChord=0.06

Fuselage "Fuselage C172"
  location (X Y Z) 0 0 0, rotation 0 0 0
  bounding box size 23.625 3.907 4.76254
  Design: Length=23.625
  cross sections:
    n   XLocPercent  YLocPercent  ZLocPercent  shape
    0   0            0            0            point
    1   0.0510325    0            0            circle Circle_Diameter=0.769947
    2   0.0566944    0            0            ellipse Ellipse_Height=0.808163 Ellipse_Width=1.66122
    3   0.0974475    0            -0.0178969   general fuselage BotStr=0.657136 BotTanAngle=90 CornerRad=0 Height=2.40721 LowStr=0.83 MaxWidthLoc=0.363636 TopStr=0.840136 TopTanAngle=90 UpStr=0.83 Width=2.89483
    4   0.200561     0            -0.0200909   general fuselage BotStr=0.83 BotTanAngle=90 CornerRad=0 Height=3.19649 LowStr=1.50559 MaxWidthLoc=0 TopStr=0.83 TopTanAngle=90 UpStr=1.59709 Width=3.47139
    5   0.285152     0            0.00773333   general fuselage BotStr=1.43905 BotTanAngle=90 CornerRad=0 Height=4.55133 LowStr=1.49727 MaxWidthLoc=0.409091 TopStr=1.73018 TopTanAngle=90 UpStr=0.981545 Width=3.60064
    6   0.406381     0            0.0131114    general fuselage BotStr=1.43905 BotTanAngle=90 CornerRad=0 Height=4.28919 LowStr=1.49727 MaxWidthLoc=0.409091 TopStr=1.73018 TopTanAngle=90 UpStr=0.989864 Width=3.65291
    7   0.572555     0            0.00566803   general fuselage BotStr=0.756955 BotTanAngle=90 CornerRad=0 Height=2.69782 LowStr=1.48064 MaxWidthLoc=-0.1 TopStr=0.83 TopTanAngle=90 UpStr=1.61373 Width=3.14228
    8   0.877762     0            0.0258867    general fuselage BotStr=0.83 BotTanAngle=90 CornerRad=0 Height=1.56234 LowStr=1.59709 MaxWidthLoc=0.145455 TopStr=1.32259 TopTanAngle=90 UpStr=1.38914 Width=1.29025
    9   0.976355     0            0.0335792    general fuselage BotStr=0.83 BotTanAngle=90 CornerRad=0 Height=1.16822 LowStr=1.66364 MaxWidthLoc=0 TopStr=0.748636 TopTanAngle=90 UpStr=1.63868 Width=0.665147
    10  1            0            0.0366198    point

Blank "appendages"
  location (X Y Z) 0 0 0, rotation 0 0 0

Wing "nosegear strut", child of "appendages"
  location (X Y Z) 3.65352 0 -3.03584, rotation 166.196 -9.8913 0
  bounding box size 1.00535 0.0546619 3.59736
  totals: TotalSpan=3.5 TotalProjectedSpan=0.841572 TotalChord=0.4273 TotalArea=1.49555 TotalAR=0.473567 MAC=0.4273
  root: chord 0.4273, twist 0, NACA 4-series Camber=0 CamberLoc=0.2 ThickChord=0.333
  sections:
    n  Span  Root_Chord  Tip_Chord  Area     Sweep  Sweep_Location  Dihedral  Twist  Twist_Location  tip airfoil
    1  3.5   0.4273      0.4273     1.49555  0      0               -76.087   0      0.25            as above

Wing "gear Struts", child of "appendages"
  location (X Y Z) 8.93181 1.31522 -1.40541, rotation 55.2826 0.108696 0
  symmetric about XZ
  bounding box size 0.433749 9.29141 1.32418
  totals: TotalSpan=7 TotalProjectedSpan=1.68314 TotalChord=0.4273 TotalArea=2.9911 TotalAR=0.947133 MAC=0.4273
  root: chord 0.4273, twist 0, NACA 4-series Camber=0 CamberLoc=0.2 ThickChord=0.333
  sections:
    n  Span  Root_Chord  Tip_Chord  Area     Sweep  Sweep_Location  Dihedral  Twist  Twist_Location  tip airfoil
    1  3.5   0.4273      0.4273     1.49555  0      0               -76.087   0      0.25            as above

Fuselage "nosegear", child of "appendages"
  location (X Y Z) 2.75926 0 -3.1471, rotation 0 0 0
  bounding box size 2.77355 0.8 1.1448
  Design: Length=2.73994
  cross sections:
    n  XLocPercent  YLocPercent  ZLocPercent  shape
    0  0            0            0            point
    1  0.364865     0            0            ellipse Ellipse_Height=1.1448 Ellipse_Width=0.8
    2  0.711614     0            0            ellipse Ellipse_Height=0.942103 Ellipse_Width=0.8
    3  1            0            0            point

Fuselage "main gear", child of "appendages"
  location (X Y Z) 7.61308 4.51351 -2.66627, rotation 0 -5.32609 0
  symmetric about XZ
  bounding box size 3.61694 9.82703 1.52279
  Design: Length=3.57689
  cross sections:
    n  XLocPercent  YLocPercent  YRotate  ZLocPercent  shape
    0  0            0            0        0            point
    1  0.374258     0            3.21429  -0.0438012   ellipse Ellipse_Height=1.5 Ellipse_Width=0.8
    2  0.628013     0            0        0.00339742   ellipse Ellipse_Height=0.909779 Ellipse_Width=0.8
    3  1            0            0        -0.0015166   point

Wing "Struts", child of "appendages"
  location (X Y Z) 6.26489 1.42391 -1.65414, rotation 43.1087 0.108696 -4.56522
  symmetric about XZ
  bounding box size 1.04546 17.0696 3.97686
  totals: TotalSpan=16.1667 TotalProjectedSpan=15.6624 TotalChord=0.4273 TotalArea=6.90802 TotalAR=35.5111 MAC=0.4273
  root: chord 0.4273, twist 0, NACA 4-series Camber=0 CamberLoc=0.2 ThickChord=0.333
  sections:
    n  Span     Root_Chord  Tip_Chord  Area     Sweep  Sweep_Location  Dihedral  Twist  Twist_Location  tip airfoil
    1  8.08333  0.4273      0.4273     3.45401  0      0               -14.3478  0      0.25            as above

VSPAERO settings: Sref=174 bref=35.88 cref=4.86 Xcg=5.72804 Ycg=0 Zcg=2.495 AlphaStart=10 AlphaEnd=-1.5 AlphaNpts=1 BetaStart=0 BetaEnd=0 BetaNpts=1 MachStart=0 MachEnd=0 MachNpts=1 ReCref=5.1e+06 Vinf=100 Rho=0.002377
  control group "elev": DeflectionAngle=0
  control group "flaps": DeflectionAngle=-38
